# Доли рынка компаний
# Акваника | РОСМ | Городецкие источники
x := [0.83; 0.81; 0.74; 0.71; 0.66; 0.54; 0.49; 0.45; 0.44; 0.41; 0.35; 0.30]
y := [0.12; 0.15; 0.26; 0.18; 0.29; 0.33; 0.41; 0.43; 0.45; 0.40; 0.49; 0.51]
z := [0.09; 0.06; 0.04; 0.05; 0.09; 0.15; 0.20; 0.17; 0.12; 0.14; 0.17; 0.13]
# Количество лет для сравнения
n := 12
x := [0.83; 0.81; 0.74; 0.71; 0.66; 0.54; 0.49; 0.45; 0.44; 0.43; 0.35; 0.40]
y := [0.12; 0.15; 0.26; 0.18; 0.29; 0.33; 0.41; 0.43; 0.45; 0.40; 0.49; 0.44]
z := [0.09; 0.06; 0.04; 0.05; 0.09; 0.15; 0.20; 0.17; 0.12; 0.14; 0.17; 0.14]
d(x) :=
    for i ∈ 0 .. n - 2
        d[i] ← x[i + 1] - x[i]
    d
# Интегральный метод подсчёта коэффициентов
intcoefZ(z) :=
    for i ∈ 0 .. n - 2
        Z[i, 0] ← (z[i + 1] + z[i])/2
    for i ∈ 0 .. n - 2
        Z[i, 3] ← (z[i + 1]^2 + z[i]^2)/2
    for i ∈ 0 .. n - 2
        Z[i, 1] ← (x[i + 1]*z[i + 1] + (x[i]*z[i]))/2
    for i ∈ 0 .. n - 2
        Z[i, 2] ← (y[i + 1]*z[i + 1] + (y[i]*z[i]))/2
    Z
intcoefX(x) :=
    for i ∈ 0 .. n - 2
        X[i, 0] ← (x[i + 1] + x[i])/2
    for i ∈ 0 .. n - 2
        X[i, 1] ← (x[i + 1]^2 + x[i]^2)/2
    for i ∈ 0 .. n - 2
        X[i, 2] ← (x[i + 1]*y[i + 1] + (x[i]*y[i]))/2
    for i ∈ 0 .. n - 2
        X[i, 3] ← (x[i + 1]*z[i + 1] + (x[i]*z[i]))/2
    X
intcoefY(y) :=
    for i ∈ 0 .. n - 2
        Y[i, 0] ← (y[i + 1] + y[i])/2
    for i ∈ 0 .. n - 2
        Y[i, 2] ← (y[i + 1]^2 + y[i]^2)/2
    for i ∈ 0 .. n - 2
        Y[i, 1] ← (x[i + 1]*y[i + 1] + (x[i]*y[i]))/2
    for i ∈ 0 .. n - 2
        Y[i, 3] ← (y[i + 1]*z[i + 1] + (y[i]*z[i]))/2
    Y
# Составление матриц
X := intcoefX(x)
dx := d(x)
Y := intcoefY(y)
dy := d(y)
Z := intcoefZ(z)
dz := d(z)
# Коэффициенты конкуренции
X = [
    0.82, 0.6725, 0.11055, 0.06165;
    0.775, 0.60185, 0.15695, 0.0391;
    0.725, 0.52585, 0.1601, 0.03255;
    0.685, 0.46985, 0.1596, 0.04745;
    0.6, 0.3636, 0.1848, 0.0702;
    0.515, 0.26585, 0.18955, 0.0895;
    0.47, 0.2213, 0.1972, 0.08725;
    0.445, 0.19805, 0.19575, 0.06465;
    0.435, 0.18925, 0.185, 0.0565;
    0.39, 0.1537, 0.17175, 0.05985;
    0.375, 0.14125, 0.17375, 0.05775
]
a := (transpose(X)*X)^-1*transpose(X)*dx = [0.686681; -0.733072; -0.864494; -0.455326]
b := (transpose(Y)*Y)^-1*transpose(Y)*dy = [1.3815; -0.90607; -3.10948; 2.52367]
c := (transpose(Z)*Z)^-1*transpose(Z)*dz = [10.4409; -10.0177; -15.5214; 3.73137]
# Статическая система
# Решение системы
newdel(a, g) :=
    nd[0] ← g[0]
    for i ∈ 0 .. n - 2
        nd[i + 1] ← g[i] + g[i]*(a[0] + a[1]*x[i] + a[2]*y[i] + a[3]*z[i])
    nd
ndx := newdel(a, x)
ndy := newdel(b, y)
ndz := newdel(c, z)
Результат
ndx = [0.83; 0.774815; 0.758078; 0.666907; 0.701355; 0.601372; 0.506109; 0.432164; 0.408447; 0.405006; 0.413624; 0.325184]
ndy = [0.12; 0.178015; 0.199887; 0.260907; 0.23484; 0.321574; 0.410733; 0.478623; 0.458258; 0.398881; 0.440565; 0.475179]
ndz = [0.09; 0.143948; 0.0733317; 0.00565835; 0.0860506; 0.0597423; 0.220343; 0.18294; 0.151817; 0.0595468; 0.202593; 0.1638]
n := 2011 .. 2022
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n := 12
# Прогнозирование на 2022 для доклада
forecast :=
    px[0] ← x[n - 1]
    py[0] ← y[n - 1]
    pz[0] ← z[n - 1]
    a ← a
    b ← b
    c ← c
    i ← 1
    px[i] ← px[i - 1] + px[i - 1]*(a[0] + a[1]*px[i - 1] + a[2]*py[i - 1] + a[3]*pz[i - 1])
    py[i] ← py[i - 1] + py[i - 1]*(b[0] + b[1]*px[i - 1] + b[2]*py[i - 1] + b[3]*pz[i - 1])
    pz[i] ← pz[i - 1] + pz[i - 1]*(c[0] + c[1]*px[i - 1] + c[2]*py[i - 1] + c[3]*pz[i - 1])
    FP[:, 0] ← px
    FP[:, 1] ← py
    FP[:, 2] ← pz
    FP
fpx := forecast[:, 0]
fpy := forecast[:, 1]
forecast = [0.4, 0.44, 0.14; 0.379732, 0.441854, 0.157748]
fpz := forecast[:, 2]
forecastgraph :=
    for i ∈ 0 .. n - 2
        forecastgraphX[i] ← x[i]
        forecastgraphY[i] ← y[i]
        forecastgraphZ[i] ← z[i]
    for i ∈ 0 .. 1
        forecastgraphX[i + n - 2] ← fpx[i]
        forecastgraphY[i + n - 2] ← fpy[i]
        forecastgraphZ[i + n - 2] ← fpz[i]
    return augment(forecastgraphX, forecastgraphY, forecastgraphZ)
# Вывод долей с 2011 по 2021 и прогноз на 2022 (строка 11)
FeatureX := forecastgraph[:, 0]
forecastgraph = [
    0.83, 0.12, 0.09;
    0.81, 0.15, 0.06;
    0.74, 0.26, 0.04;
    0.71, 0.18, 0.05;
    0.66, 0.29, 0.09;
    0.54, 0.33, 0.15;
    0.49, 0.41, 0.2;
    0.45, 0.43, 0.17;
    0.44, 0.45, 0.12;
    0.43, 0.4, 0.14;
    0.4, 0.44, 0.14;
    0.379732, 0.441854, 0.157748
]
FeatureY := forecastgraph[:, 1]
FeatureZ := forecastgraph[:, 2]
# График с актуальными значениями и прогнозом на 2022 год
n := 2011 .. 2022
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# Точные значения прогноза и фактических данных
FeatureX[11] = 0.379732
FeatureY[11] = 0.441854
FeatureZ[11] = 0.157748
x[11] = 0.4
y[11] = 0.44
z[11] = 0.14
# Решение системы диф. уравнений
a := (transpose(X)*X)^-1*transpose(X)*dx = [0.686681; -0.733072; -0.864494; -0.455326]
b := (transpose(Y)*Y)^-1*transpose(Y)*dy = [1.3815; -0.90607; -3.10948; 2.52367]
c := (transpose(Z)*Z)^-1*transpose(Z)*dz = [10.4409; -10.0177; -15.5214; 3.73137]
v := [0.83; 0.12; 0.09]  # Начальные значения долей
Dint(t, v) := [
    v[0]*(a[0] + a[1]*v[0] + a[2]*v[1] + a[3]*v[2]);
    v[1]*(b[0] + b[1]*v[0] + b[2]*v[1] + b[3]*v[2]);
    v[2]*(c[0] + c[1]*v[0] + c[2]*v[1] + c[3]*v[2])
]
res := rkfixed(v, 0, 11, 11, Dint)
(Рунге - Кутта)
k := 2011 .. 2022
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res = [
    0, 0.83, 0.12, 0.09;
    1, 0.761707, 0.19378, 0.147946;
    2, 0.673682, 0.287322, 0.166183;
    3, 0.597447, 0.343505, 0.119085;
    4, 0.550998, 0.352257, 0.0835145;
    5, 0.525858, 0.351108, 0.0746263;
    6, 0.50925, 0.354753, 0.080394;
    7, 0.493572, 0.365135, 0.0945628;
    8, 0.475025, 0.381783, 0.113679;
    9, 0.452314, 0.403213, 0.134499;
    10, 0.425986, 0.427048, 0.154184;
    11, 0.39755, 0.45105, 0.171873
]
n := 12
lgd(x) :=
    for i ∈ 0 .. n - 2
        lx[i] ← ln(x[i + 1]) - ln(x[i])
    lx
# Логарифмический метод нахождения коэффициентов
lgcoefZ(z) :=
    for i ∈ 0 .. n - 2
        X[i, 0] ← 1
    for i ∈ 0 .. n - 2
        X[i, 1] ← (x[i + 1] + x[i])/2
    for i ∈ 0 .. n - 2
        X[i, 2] ← (y[i + 1] + y[i])/2
    for i ∈ 0 .. n - 2
        X[i, 3] ← (z[i + 1] + z[i])/2
    X
lgcoefX(x) :=
    for i ∈ 0 .. n - 2
        X[i, 0] ← 1
    for i ∈ 0 .. n - 2
        X[i, 1] ← (x[i + 1] + x[i])/2
    for i ∈ 0 .. n - 2
        X[i, 2] ← (y[i + 1] + y[i])/2
    for i ∈ 0 .. n - 2
        X[i, 3] ← (z[i + 1] + z[i])/2
    X
lgcoefY(y) :=
    for i ∈ 0 .. n - 2
        X[i, 0] ← 1
    for i ∈ 0 .. n - 2
        X[i, 1] ← (x[i + 1] + x[i])/2
    for i ∈ 0 .. n - 2
        X[i, 2] ← (y[i + 1] + y[i])/2
    for i ∈ 0 .. n - 2
        X[i, 3] ← (z[i + 1] + z[i])/2
    X
# Составление матриц
X := lgcoefX(x)
dx := lgd(x)
dy := lgd(y)
Y := lgcoefY(y)
dz := lgd(z)
Z := lgcoefZ(z)
# Коэффициенты взаимодействия
a := (transpose(X)*X)^-1*transpose(X)*dx = [0.019969; -0.118474; 0.254292; -0.876769]
b := (transpose(Y)*Y)^-1*transpose(Y)*dy = [-0.931471; 1.29837; 0.0453485; 2.51626]
c := (transpose(Z)*Z)^-1*transpose(Z)*dz = [8.96473; -8.74792; -11.5342; -0.993398]
# Статическая система
Результат
ndx := newdel(a, x)
ndy := newdel(b, y)
ndz := newdel(c, z)
X = [
    1, 0.82, 0.135, 0.075;
    1, 0.775, 0.205, 0.05;
    1, 0.725, 0.22, 0.045;
    1, 0.685, 0.235, 0.07;
    1, 0.6, 0.31, 0.12;
    1, 0.515, 0.37, 0.175;
    1, 0.47, 0.42, 0.185;
    1, 0.445, 0.44, 0.145;
    1, 0.435, 0.425, 0.13;
    1, 0.39, 0.445, 0.155;
    1, 0.375, 0.465, 0.155
]
ndy = [0.12; 0.165369; 0.191698; 0.296858; 0.202382; 0.337869; 0.383477; 0.502895; 0.473025; 0.432976; 0.398897; 0.476742]
ndx = [0.83; 0.72479; 0.736729; 0.712874; 0.665828; 0.618164; 0.490533; 0.436503; 0.417128; 0.429906; 0.407637; 0.333919]
ndz = [0.09; 0.11074; 0.0653508; 0.0181056; 0.081394; 0.06811; 0.192833; 0.150109; 0.152929; 0.0967255; 0.203051; 0.183995]
n := 2011 .. 2022
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n := 12
# Прогнозирование на 2022 для доклада
forecast :=
    px[0] ← x[n - 2]
    py[0] ← y[n - 2]
    pz[0] ← z[n - 2]
    a ← a
    b ← b
    c ← c
    i ← 1
    px[i] ← px[i - 1] + px[i - 1]*(a[0] + a[1]*px[i - 1] + a[2]*py[i - 1] + a[3]*pz[i - 1])
    py[i] ← py[i - 1] + py[i - 1]*(b[0] + b[1]*px[i - 1] + b[2]*py[i - 1] + b[3]*pz[i - 1])
    pz[i] ← pz[i - 1] + pz[i - 1]*(c[0] + c[1]*px[i - 1] + c[2]*py[i - 1] + c[3]*pz[i - 1])
    FP[:, 0] ← px
    FP[:, 1] ← py
    FP[:, 2] ← pz
    FP
fpx := forecast[:, 0]
fpy := forecast[:, 1]
forecast = [0.35, 0.49, 0.17; 0.333919, 0.476742, 0.183995]
fpz := forecast[:, 2]
forecastgraph :=
    for i ∈ 0 .. n - 2
        forecastgraphX[i] ← x[i]
        forecastgraphY[i] ← y[i]
        forecastgraphZ[i] ← z[i]
    for i ∈ 0 .. 1
        forecastgraphX[i + n - 2] ← fpx[i]
        forecastgraphY[i + n - 2] ← fpy[i]
        forecastgraphZ[i + n - 2] ← fpz[i]
    return augment(forecastgraphX, forecastgraphY, forecastgraphZ)
# Вывод долей с 2011 по 2021 и прогноз на 2022 (строка 11)
FeatureX := forecastgraph[:, 0]
FeatureY := forecastgraph[:, 1]
FeatureZ := forecastgraph[:, 2]
forecastgraph = [
    0.83, 0.12, 0.09;
    0.81, 0.15, 0.06;
    0.74, 0.26, 0.04;
    0.71, 0.18, 0.05;
    0.66, 0.29, 0.09;
    0.54, 0.33, 0.15;
    0.49, 0.41, 0.2;
    0.45, 0.43, 0.17;
    0.44, 0.45, 0.12;
    0.43, 0.4, 0.14;
    0.35, 0.49, 0.17;
    0.333919, 0.476742, 0.183995
]
# График с актуальными значениями и прогнозом на 2022 год
n := 2011 .. 2022
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# Точные значения прогноза и фактических данных
FeatureX[11] = 0.333919
FeatureY[11] = 0.476742
FeatureZ[11] = 0.183995
x[11] = 0.4
y[11] = 0.44
z[11] = 0.14
# Решение системы диф. уравнений методом Рунге-Кутта
v := [0.83; 0.12; 0.09]  # Начальные значения долей
Glg(t, v) := [
    v[0]*(a[0] + a[1]*v[0] + a[2]*v[1] + a[3]*v[2]);
    v[1]*(b[0] + b[1]*v[0] + b[2]*v[1] + b[3]*v[2]);
    v[2]*(c[0] + c[1]*v[0] + c[2]*v[1] + c[3]*v[2])
]
res := rkfixed(v, 0, 11, 11, Glg)
(Рунге - Кутта)
res = [
    0, 0.83, 0.12, 0.09;
    1, 0.729252, 0.171254, 0.131093;
    2, 0.623833, 0.251394, 0.211531;
    3, 0.523696, 0.382187, 0.236192;
    4, 0.477744, 0.468227, 0.133037;
    5, 0.475571, 0.445903, 0.0722393;
    6, 0.481746, 0.3926, 0.0638811;
    7, 0.477501, 0.355383, 0.094797;
    8, 0.44831, 0.365732, 0.184313;
    9, 0.39228, 0.459107, 0.263992;
    10, 0.35682, 0.532409, 0.186511;
    11, 0.347096, 0.503971, 0.142863
]
# Рассмотрение динамической системы
Акваника
РОСМ
# Городецкие источники
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x := [0.527; 0.614; 0.711; 0.778; 0.857; 0.885; 0.839; 0.890; 0.902; 0.905; 0.911; 0.919]
y := [0.343; 0.224; 0.155; 0.128; 0.102; 0.080; 0.112; 0.080; 0.062; 0.067; 0.064; 0.064]
z := [0.131; 0.162; 0.139; 0.110; 0.061; 0.045; 0.049; 0.040; 0.036; 0.029; 0.024; 0.017]  # Количество лет для сравнения
n := 12
d(x) :=
    for i ∈ 0 .. n - 2
        d[i] ← x[i + 1] - x[i]
    d
dinamIntX(x) :=
    for n ∈ 2 .. n
        for i ∈ 0 .. n - 2
            X[i, 0] ← (x[i + 1] + x[i])/2
            X[i, 1] ← (x[i + 1]^2 + x[i]^2)/2
            X[i, 2] ← (x[i + 1]*y[i + 1] + (x[i]*y[i]))/2
            X[i, 3] ← (x[i + 1]*z[i + 1] + (x[i]*z[i]))/2
            d[i] ← x[i + 1] - x[i]
        ax ← (transpose(X)*X)^-1*transpose(X)*d
        for i ∈ 0 .. 3
            a[n, i] ← ax[i]
    a
dinamIntZ(z) :=
    for n ∈ 2 .. n
        for i ∈ 0 .. n - 2
            Z[i, 0] ← (z[i + 1] + z[i])/2
            Z[i, 3] ← (z[i + 1]^2 + z[i]^2)/2
            Z[i, 1] ← (x[i + 1]*z[i + 1] + (x[i]*z[i]))/2
            Z[i, 2] ← (y[i + 1]*z[i + 1] + (y[i]*z[i]))/2
            d[i] ← z[i + 1] - z[i]
        az ← (transpose(Z)*Z)^-1*transpose(Z)*d
        for i ∈ 0 .. 3
            c[n, i] ← az[i]
    c
dinamIntY(y) :=
    for n ∈ 2 .. n
        for i ∈ 0 .. n - 2
            Y[i, 0] ← (y[i + 1] + y[i])/2
            Y[i, 2] ← (y[i + 1]^2 + y[i]^2)/2
            Y[i, 1] ← (x[i + 1]*y[i + 1] + (x[i]*y[i]))/2
            Y[i, 3] ← (y[i + 1]*z[i + 1] + (y[i]*z[i]))/2
            d[i] ← y[i + 1] - y[i]
        ay ← (transpose(Y)*Y)^-1*transpose(Y)*d
        for i ∈ 0 .. 3
            b[n, i] ← ay[i]
    b
a := dinamIntX(x)
b := dinamIntY(y)
c := dinamIntZ(z)
a = [
    0, 0, 0, 0;
    0, 0, 0, 0;
    0, 0, 0, 1.392;
    -0.074, 0.04, 0.402, -0.172;
    0.40125, -0.372812, -0.342937, 1.35512;
    24.8519, -23.8992, -24.5005, -28.1068;
    -3.54761, 3.43981, 3.87321, 4.41306;
    -6.68658, 6.49027, 7.08944, 7.74596;
    -3.19472, 3.09829, 3.56245, 3.95381;
    -2.27097, 2.19999, 2.5233, 3.10059;
    -1.49491, 1.44016, 1.66025, 2.39814;
    -1.03567, 0.990426, 1.17944, 1.93741;
    -0.697152, 0.658905, 0.85044, 1.55804
]
b = [
    0, 0, 0, 0;
    0, 0, 0, 0;
    -0.461125, 0, -1.904, -3.808;
    0.028, 0.206, -1.028, 0.484;
    0.152, 1.334, 0.18675, -2.6635;
    -145.828, 140.242, 144.24, 167.458;
    -14.7874, 14.273, 13.8277, 15.7773;
    23.1913, -22.484, -24.3018, -26.534;
    7.79351, -7.58439, -8.86623, -9.324;
    4.89823, -4.78744, -5.93859, -6.10716;
    6.08718, -5.94724, -7.15342, -7.35721;
    5.29865, -5.17822, -6.35284, -6.518;
    5.11105, -4.99528, -6.16347, -6.31624
]
c = [
    0, 0, 0, 0;
    0, 0, 0, 0;
    0, 0, 0, 0;
    0.736, -2.55, 2.192, 2.944;
    -0.3115, 0.11475, 4.18762, -4.728;
    -337.309, 322.735, 336.84, 395.177;
    26.3612, -26.3103, -23.504, -30.4893;
    30.0355, -29.8569, -27.1864, -34.6373;
    23.4764, -23.5253, -20.6203, -27.2233;
    23.4858, -23.5343, -20.6297, -27.2337;
    20.8892, -21.0122, -17.97, -24.4579;
    19.7388, -19.8953, -16.8, -23.2126;
    18.4857, -18.6786, -15.5302, -21.8494
]
v := [0.527; 0.343; 0.131]
dinamRunge(v) :=
    for i ∈ 0 .. n - 8
        for j ∈ 0 .. 3
            ax[j] ← a[i, j]
            by[j] ← b[i, j]
            cz[j] ← c[i, j]
        Dint(t, v) ← [
            v[0]*(ax[0] + ax[1]*v[0] + ax[2]*v[1] + ax[3]*v[2]);
            v[1]*(by[0] + by[1]*v[0] + by[2]*v[1] + by[3]*v[2]);
            v[2]*(cz[0] + cz[1]*v[0] + cz[2]*v[1] + cz[3]*v[2])
        ]
        for j ∈ 0 .. 2
            v[j] ← rkfixed(v, 0, 1, 1, Dint)[1, j + 1]
            res[i, j] ← v[j]
    res
coef := dinamRunge(v) = [
    0.527, 0.343, 0.131;
    0.527, 0.343, 0.131;
    0.632418, 0.0842542, 0.131;
    0.612263, 0.0945904, 0.103205;
    0.764404, 0.266638, 0.25865
]
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dinamLgX(x) :=
    for n ∈ 3 .. n
        for i ∈ 0 .. n - 2
            X[i, 0] ← 1
            X[i, 1] ← (x[i + 1] + x[i])/2
            X[i, 2] ← (y[i + 1] + y[i])/2
            X[i, 3] ← (z[i + 1] + z[i])/2
            d[i] ← x[i + 1] - x[i]
        ax ← (transpose(X)*X)^-1*transpose(X)*d
        for i ∈ 0 .. 3
            a[n, i] ← ax[i]
    a
dinamLgZ(z) :=
    for n ∈ 3 .. n
        for i ∈ 0 .. n - 2
            X[i, 0] ← 1
            X[i, 1] ← (x[i + 1] + x[i])/2
            X[i, 2] ← (y[i + 1] + y[i])/2
            X[i, 3] ← (z[i + 1] + z[i])/2
            d[i] ← z[i + 1] - z[i]
        az ← (transpose(X)*X)^-1*transpose(X)*d
        for i ∈ 0 .. 3
            c[n, i] ← az[i]
    c
dinamLgY(y) :=
    for n ∈ 3 .. n
        for i ∈ 0 .. n - 2
            X[i, 0] ← 1
            X[i, 1] ← (x[i + 1] + x[i])/2
            X[i, 2] ← (y[i + 1] + y[i])/2
            X[i, 3] ← (z[i + 1] + z[i])/2
            d[i] ← y[i + 1] - y[i]
        ay ← (transpose(X)*X)^-1*transpose(X)*d
        for i ∈ 0 .. 3
            b[n, i] ← ay[i]
    b
a := dinamLgX(x)
b := dinamLgY(y)
c := dinamLgZ(z)
v := [0.527; 0.343; 0.131]
dinamRunge(v) :=
    for i ∈ 0 .. n - 1
        for j ∈ 0 .. 3
            ax[j] ← a[i, j]
            by[j] ← b[i, j]
            cz[j] ← c[i, j]
        Dint(t, v) ← [
            v[0]*(ax[0] + ax[1]*v[0] + ax[2]*v[1] + ax[3]*v[2]);
            v[1]*(by[0] + by[1]*v[0] + by[2]*v[1] + by[3]*v[2]);
            v[2]*(cz[0] + cz[1]*v[0] + cz[2]*v[1] + cz[3]*v[2])
        ]
        for j ∈ 0 .. 2
            v[j] ← rkfixed(v, 0, 0.3, 1, Dint)[1, j + 1]
            res[i, j] ← v[j]
    res
a = [
    0, 0, 0, 0;
    0, 0, 0, 0;
    0, 0, 0, 0;
    -0.194, -0.0535, -0.135656, 0.32;
    -0.135312, 0.0349375, -0.0501875, 1.28412;
    20.295, -19.4803, -20.1542, -23.0764;
    -3.19197, 3.11813, 3.25759, 3.95345;
    -5.56227, 5.41949, 5.66873, 6.50866;
    -2.67542, 2.61772, 2.75475, 3.3549;
    -2.17484, 2.13089, 2.21778, 2.8581;
    -1.68302, 1.64926, 1.69015, 2.387;
    -1.33985, 1.31332, 1.33451, 2.03773;
    -1.07098, 1.0502, 1.06633, 1.7464
]
b = [
    0, 0, 0, 0;
    0, 0, 0, 0;
    0, 0, 0, 0;
    0.138, 0.0095, -0.453219, 1.6;
    0.0365625, 0.102063, -0.427813, -0.442625;
    -12.4475, 12.0197, 11.8458, 14.4236;
    -1.40411, 1.39396, 0.837647, 1.71434;
    2.91035, -2.79503, -3.55116, -2.93669;
    1.24306, -1.17687, -1.8682, -1.11525;
    0.405928, -0.36274, -0.970201, -0.284433;
    0.365456, -0.323107, -0.926783, -0.245667;
    0.211606, -0.172496, -0.767339, -0.089077;
    0.171441, -0.133191, -0.727278, -0.0455575
]
c = [
    0, 0, 0, 0;
    0, 0, 0, 0;
    0, 0, 0, 0;
    0.046, 0.0385, 0.529094, -1.728;
    0.101687, -0.108063, 0.436812, -0.910875;
    -12.2352, 11.6878, 12.602, 13.8271;
    3.21684, -3.17976, -2.80068, -3.95584;
    2.21335, -2.20545, -1.7799, -2.87407;
    1.69362, -1.70103, -1.25528, -2.30628;
    1.78036, -1.78539, -1.34832, -2.39237;
    1.49848, -1.50935, -1.04593, -2.12237;
    1.33722, -1.35149, -0.878803, -1.95824;
    1.17828, -1.19595, -0.720271, -1.78602
]
coef := dinamRunge(v) = [
    0.527, 0.343, 0.131;
    0.527, 0.343, 0.131;
    0.527, 0.343, 0.131;
    0.492291, 0.363421, 0.132364;
    0.497666, 0.350119, 0.135412;
    0.541492, 0.351599, 0.145904;
    0.585104, 0.351409, 0.133367;
    0.704126, 0.258592, 0.120567;
    0.781194, 0.232944, 0.110668;
    0.879965, 0.219735, 0.0959325;
    1.00551, 0.206096, 0.0807851;
    1.16943, 0.195566, 0.0647582
]
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# Рассмотрение динамической системы  без квадратов
# Акваника | РОСМ | Городецкие источники
x := [0.527; 0.614; 0.711; 0.778; 0.857; 0.885; 0.839; 0.890; 0.902; 0.905; 0.911; 0.919]
y := [0.343; 0.224; 0.155; 0.128; 0.102; 0.080; 0.112; 0.080; 0.062; 0.067; 0.064; 0.064]
z := [0.131; 0.162; 0.139; 0.110; 0.061; 0.045; 0.049; 0.040; 0.036; 0.029; 0.024; 0.017]  # Количество лет для сравнения
n := 12
d(x) :=
    for i ∈ 0 .. n - 2
        d[i] ← x[i + 1] - x[i]
    d
intcoefZ(z) :=
    for i ∈ 0 .. n - 2
        Z[i, 0] ← (z[i + 1] + z[i])/2
    for i ∈ 0 .. n - 2
        Z[i, 1] ← (x[i + 1]*z[i + 1] + (x[i]*z[i]))/2
    for i ∈ 0 .. n - 2
        Z[i, 2] ← (y[i + 1]*z[i + 1] + (y[i]*z[i]))/2
    Z
intcoefX(x) :=
    for i ∈ 0 .. n - 2
        X[i, 0] ← (x[i + 1] + x[i])/2
    for i ∈ 0 .. n - 2
        X[i, 1] ← (x[i + 1]*y[i + 1] + (x[i]*y[i]))/2
    for i ∈ 0 .. n - 2
        X[i, 2] ← (x[i + 1]*z[i + 1] + (x[i]*z[i]))/2
    X
intcoefY(y) :=
    for i ∈ 0 .. n - 2
        Y[i, 0] ← (y[i + 1] + y[i])/2
    for i ∈ 0 .. n - 2
        Y[i, 1] ← (x[i + 1]*y[i + 1] + (x[i]*y[i]))/2
    for i ∈ 0 .. n - 2
        Y[i, 2] ← (y[i + 1]*z[i + 1] + (y[i]*z[i]))/2
    Y
# Составление матриц
X := intcoefX(x)
dx := d(x)
Y := intcoefY(y)
dy := d(y)
Z := intcoefZ(z)
dz := d(z)
# Коэффициенты конкуренции
a := (transpose(X)*X)^-1*transpose(X)*dx = [-0.033667; 0.113729; 1.01717]
b := (transpose(Y)*Y)^-1*transpose(Y)*dy = [-0.758918; 0.817931; -0.825229]
c := (transpose(Z)*Z)^-1*transpose(Z)*dz = [-3.51147; 2.96504; 7.26492]
a = [-0.033667; 0.113729; 1.01717]
# Решение системы диф. уравнений
b = [-0.758918; 0.817931; -0.825229]
v := [0.527; 0.343; 0.131]  # Начальные значения долей
c = [-3.51147; 2.96504; 7.26492]
Dint(t, v) := [
    v[0]*(a[0] + a[1]*v[1] + a[2]*v[2]);
    v[1]*(b[0] + b[1]*v[0] + b[2]*v[2]);
    v[2]*(c[0] + c[1]*v[0] + c[2]*v[1])
]
res := rkfixed(v, 0, 10, 11, Dint)
(Рунге - Кутта)
k := 2011 .. 2022
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lgcoefZ(z) :=
    for i ∈ 0 .. n - 2
        X[i, 0] ← 1
    for i ∈ 0 .. n - 2
        X[i, 1] ← (x[i + 1] + x[i])/2
    for i ∈ 0 .. n - 2
        X[i, 2] ← (y[i + 1] + y[i])/2
    for i ∈ 0 .. n - 2
        X[i, 3] ← (z[i + 1] + z[i])/2
    X
lgcoefX(x) :=
    for i ∈ 0 .. n - 2
        X[i, 0] ← 1
    for i ∈ 0 .. n - 2
        X[i, 1] ← (x[i + 1] + x[i])/2
    for i ∈ 0 .. n - 2
        X[i, 2] ← (y[i + 1] + y[i])/2
    for i ∈ 0 .. n - 2
        X[i, 3] ← (z[i + 1] + z[i])/2
    X
lgcoefY(y) :=
    for i ∈ 0 .. n - 2
        X[i, 0] ← 1
    for i ∈ 0 .. n - 2
        X[i, 1] ← (x[i + 1] + x[i])/2
    for i ∈ 0 .. n - 2
        X[i, 2] ← (y[i + 1] + y[i])/2
    for i ∈ 0 .. n - 2
        X[i, 3] ← (z[i + 1] + z[i])/2
    X
# Составление матриц
X := lgcoefX(x)
dx := d(x)
Y := lgcoefY(y)
dy := d(y)
Z := lgcoefZ(z)
dz := d(z)
# Коэффициенты конкуренции
a := (transpose(X)*X)^-1*transpose(X)*dx = [-1.07098; 1.0502; 1.06633; 1.7464]
b := (transpose(Y)*Y)^-1*transpose(Y)*dy = [0.171441; -0.133191; -0.727278; -0.0455575]
c := (transpose(Z)*Z)^-1*transpose(Z)*dz = [1.17828; -1.19595; -0.720271; -1.78602]
# Решение системы диф. уравнений
v := [0.527; 0.343; 0.131]
# Начальные значения долей
Dint(t, v) := [
    v[0]*(a[0] + a[1]*v[1] + a[2]*v[2]);
    v[1]*(b[0] + b[1]*v[0] + b[2]*v[2]);
    v[2]*(c[0] + c[1]*v[0] + c[2]*v[1])
]
res := rkfixed(v, 0, 10, 11, Dint)
(Рунге - Кутта)
k := 2011 .. 2022
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